// COMSOL Multiphysics 5.5.0.292 model "empty_project.mph"
// Outline of the model tree

Parameters
  r_host = 0.2[m]
  r_pml = r_host + 0.05 [m]
  r_int = r_host - 0.02 [m]
  max_freq = 10000 [Hz]
  min_freq = 100 [Hz]
  step_freq = 500 [Hz]
  rho_particle = 1190[kg/m^3]  // wiki
  c_particle = 2730[m/s]  // https://www.olympus-ims.com/en/ndt-tutorials/thickness-gauge/appendices-velocities/
  max_mesh_size_air = 1/5*343[m/s]/max_freq  // 1/5(wave length)
  max_mesh_size_plastic = 1/5*c_particle/max_freq  // 1/5(wave length)

Selections
  sel2: Explicit "pml" on domains 1
  sel3: Explicit "plastic_hand_mada" on no domains
  com1: Complement "air" | entitydim = 2; input = {sel3, sel2, uni1}
  uni1: Union "plastic" | entitydim = 2; input = {sel3}

Couplings
  intop1: Integration "Integration over surface" on boundaries 5, 6, 9, 10

Coordinate systems
  pml1: PML "Perfectly Matched Layer 1" on selection sel2 | ScalingType = Cylindrical

Geometry
  geom1 "Geometry 1" (2D, length unit m)
    c1: Circle "host" | r = r_host
    c2: Circle "pml" | r = r_pml
    c3: Circle "int_surface" | type = curve; r = r_int
    fin: Finalize "Form Union"

Materials
  mat2: Common "Air" on all domains
    def "Basic"
      thermalexpansioncoefficient = alpha_p(pA,T)
      molarmass = 0.02897[kg/mol]
      bulkviscosity = muB(T)
      relpermeability = 1
      relpermittivity = 1
      dynamicviscosity = eta(T)
      ratioofspecificheat = 1.4
      electricconductivity = 0[S/m]
      heatcapacity = Cp(T)
      density = rho(pA,T)
      thermalconductivity = k(T)
      soundspeed = cs(T)
      eta: Piecewise | arg = T; pieces = {200.0, 1600.0, -8.38278E-7+8.35717342E-8*T^1-7.69429583E-11*T^2+4.6437266E-14*T^3-1.06585607E-17*T^4}; argunit = K; fununit = Pa*s
      Cp: Piecewise | arg = T; pieces = {200.0, 1600.0, 1047.63657-0.372589265*T^1+9.45304214E-4*T^2-6.02409443E-7*T^3+1.2858961E-10*T^4}; argunit = K; fununit = J/(kg*K)
      rho: Analytic | expr = pA*0.02897/R_const[K*mol/J]/T; args = {pA, T}; dermethod = manual; argders = {{pA, d(pA*0.02897/R_const/T,pA)}, {T, d(pA*0.02897/R_const/T,T)}}; argunit = Pa,K; fununit = kg/m^3
      k: Piecewise | arg = T; pieces = {200.0, 1600.0, -0.00227583562+1.15480022E-4*T^1-7.90252856E-8*T^2+4.11702505E-11*T^3-7.43864331E-15*T^4}; argunit = K; fununit = W/(m*K)
      cs: Analytic | expr = sqrt(1.4*R_const[K*mol/J]/0.02897*T); args = T; dermethod = manual; argunit = K; fununit = m/s
      an1: Analytic | funcname = alpha_p; expr = -1/rho(pA,T)*d(rho(pA,T),T); args = {pA, T}; argunit = Pa,K; fununit = 1/K
      an2: Analytic "Analytic 2a" | funcname = muB; expr = 0.6*eta(T); args = T; argunit = K; fununit = Pa*s
    RefractiveIndex
      n = 1
      ki = 0
    NonlinearModel
      BA = (def.gamma+1)/2
  mat1: Common "Acrylic plastic" on selection uni1
    def "Basic"
      thermalexpansioncoefficient = 7.0e-5[1/K]
      heatcapacity = 1470[J/(kg*K)]
      density = rho_particle
      thermalconductivity = 0.18[W/(m*K)]
      soundspeed = c_particle
    Enu "Young's modulus and Poisson's ratio"
      youngsmodulus = 3.2e9[Pa]
      poissonsratio = 0.35

Physics
  acpr: PressureAcoustics "Pressure Acoustics, Frequency Domain" on all domains
    dependent variable p
    fpam1: FrequencyPressureAcousticsModel "Pressure Acoustics 1" (default)
    shb1: SoundHard "Sound Hard Boundary (Wall) 1" (default)
    init1: init "Initial Values 1" (default)
    bpf1: BackgroundPressureField on selection com1 | pamp = 1; c_mat = from_mat

Mesh
  mesh1 "Mesh 1"
    size: MeshSizeDefault | hmax = 0.0335; hmin = 1.5E-4; hcurve = 0.3; hgrad = 1.3
    ftri1: FreeTri "air" on selection com1
      size1: Size on domains 2, 3 | hmax = max_mesh_size_air; custom = on
    bl1: BndLayer "pml" on selection sel2
      blp1: BndLayerProp "Boundary Layer Properties 1" on no boundaries | blnlayers = 10; blhmin = max_mesh_size_air
    ftri2: FreeTri "plastic" on selection uni1
      size1: Size on domains 2, 3 | hmax = max_mesh_size_plastic; custom = on

Studies
  std1 "Study 1"
    freq: Frequency "Frequency Domain" | plist = range(min_freq,step_freq,max_freq)

Derived values
  gev1: EvalGlobal "Global Evaluation 1"
    expr = {-1/((1[Pa])^2)*intop1(realdot(acpr.p_s, (d(acpr.p_s,x)*x+d(acpr.p_s,y)*y) /(r_int*acpr.ik))), intop1(acpr.p_s*cos(0*atan2(y,x))), intop1(acpr.p_s*cos(1*atan2(y,x))), intop1(acpr.p_s*cos(2*atan2(y,x))), intop1(acpr.p_s*cos(3*atan2(y,x))), intop1(acpr.p_s*cos(4*atan2(y,x))), intop1(acpr.p_s*cos(5*atan2(y,x))), intop1(acpr.p_s*cos(6*atan2(y,x))), intop1(acpr.p_s*cos(7*atan2(y,x))), intop1(acpr.p_s*cos(8*atan2(y,x))), intop1(acpr.p_s*cos(9*atan2(y,x))), intop1(acpr.p_s*cos(10*atan2(y,x))), intop1(acpr.p_s*cos(11*atan2(y,x))), intop1(acpr.p_s*cos(12*atan2(y,x))), intop1(acpr.p_s*cos(13*atan2(y,x))), intop1(acpr.p_s*cos(14*atan2(y,x))), intop1(acpr.p_s*cos(15*atan2(y,x))), intop1(acpr.p_s*cos(16*atan2(y,x))), intop1(acpr.p_s*cos(17*atan2(y,x))), intop1(acpr.p_s*cos(18*atan2(y,x))), intop1(acpr.p_s*cos(19*atan2(y,x))), intop1(acpr.p_s*cos(20*atan2(y,x))), intop1(acpr.p_s*cos(21*atan2(y,x))), intop1(acpr.p_s*cos(22*atan2(y,x))), intop1(acpr.p_s*cos(23*atan2(y,x))), intop1(acpr.p_s*cos(24*atan2(y,x))), intop1(acpr.p_s*cos(25*atan2(y,x))), intop1(acpr.p_s*cos(26*atan2(y,x))), intop1(acpr.p_s*cos(27*atan2(y,x))), intop1(acpr.p_s*cos(28*atan2(y,x))), intop1(acpr.p_s*cos(29*atan2(y,x))), intop1(acpr.p_s*cos(30*atan2(y,x))), intop1(acpr.p_s*cos(31*atan2(y,x))), intop1(acpr.p_s*cos(32*atan2(y,x))), intop1(acpr.p_s*cos(33*atan2(y,x))), intop1(acpr.p_s*cos(34*atan2(y,x))), intop1(acpr.p_s*cos(35*atan2(y,x))), intop1(acpr.p_s*cos(36*atan2(y,x))), intop1(acpr.p_s*cos(37*atan2(y,x))), intop1(acpr.p_s*cos(38*atan2(y,x))), intop1(acpr.p_s*cos(39*atan2(y,x))), intop1(acpr.p_s*cos(40*atan2(y,x))), intop1(acpr.p_s*cos(41*atan2(y,x))), intop1(acpr.p_s*cos(42*atan2(y,x))), intop1(acpr.p_s*cos(43*atan2(y,x))), intop1(acpr.p_s*cos(44*atan2(y,x))), intop1(acpr.p_s*cos(45*atan2(y,x))), intop1(acpr.p_s*cos(46*atan2(y,x))), intop1(acpr.p_s*cos(47*atan2(y,x))), intop1(acpr.p_s*cos(48*atan2(y,x))), intop1(acpr.p_s*cos(49*atan2(y,x)))}
    descr = {sigma, 0, 1, 2, 3, 4, 5, 6, 7, 8, 9, 10, 11, 12, 13, 14, 15, 16, 17, 18, 19, 20, 21, 22, 23, 24, 25, 26, 27, 28, 29, 30, 31, 32, 33, 34, 35, 36, 37, 38, 39, 40, 41, 42, 43, 44, 45, 46, 47, 48, 49}