// COMSOL Multiphysics 5.5.0.359 model "empty_project.mph"
// Outline of the model tree

Parameters
  rad = 2000[nm]
  pml = 300[nm]
  wl = 1300[nm]
  hh = 600[nm]
  d = wl/2
  xi = 0[nm]
  yi = 0[nm]
  zi = 0[nm]
  theta = 44[deg]  // scattering angle

Variables
  var1 "Variables 1"
    nrelPoav = ewfd.Poavx*ewfd.nPMLx+ewfd.Poavy*ewfd.nPMLy+ewfd.Poavz*ewfd.nPMLz  // Relative normal Poynting flux
    sigma = intop_over_solid_angle(nrelPoav)

Selections
  sel1: Explicit "pml" on domains 1-6, 9-14
  sel2: Explicit "Si_hand_made" on no domains
  uni1: Union "Si" | entitydim = 3; input = {sel2}
  com1: Complement "air" | entitydim = 3; input = {sel2, uni1, sel3}
  sel3: Explicit "substrate" on domains 5, 6, 8, 11, 12
  com2: Complement "no_pml" | entitydim = 3; input = {sel1}

Couplings
  intop1: Integration on boundaries 21, 22, 34, 41 | opname = intop_over_solid_angle

Coordinate systems
  pml1: PML "Perfectly Matched Layer 1" on selection sel1 | ScalingType = Spherical

Geometry
  geom1 "Geometry 1" (3D, length unit nm)
    sph1: Sphere "Space" | layername = Layer 1; layer = pml; r = rad+pml
    wp1: WorkPlane | quickz = -hh/2; unite = on
    pard1: PartitionDomains | domain = sph1(1) domains 1-9; workplane = wp1
    pt1: Point "Dipole" | p = {xi, yi, zi}
    wp2: WorkPlane | quickz = rad*cos(theta/2); unite = on
    parf1: PartitionFaces | face = pard1(1) boundaries 16, 17, 30, 38; partitionwith = workplane; workplane = wp2
    fin: Finalize "Form Union"

Materials
  mat1: Common "Air" on selection com1
    def "Basic"
      thermalexpansioncoefficient = alpha_p(pA,T)
      molarmass = 0.02897[kg/mol]
      bulkviscosity = muB(T)
      relpermeability = 1
      relpermittivity = 1
      dynamicviscosity = eta(T)
      ratioofspecificheat = 1.4
      electricconductivity = 0[S/m]
      heatcapacity = Cp(T)
      density = rho(pA,T)
      thermalconductivity = k(T)
      soundspeed = cs(T)
      eta: Piecewise | arg = T; pieces = {200.0, 1600.0, -8.38278E-7+8.35717342E-8*T^1-7.69429583E-11*T^2+4.6437266E-14*T^3-1.06585607E-17*T^4}; argunit = K; fununit = Pa*s
      Cp: Piecewise | arg = T; pieces = {200.0, 1600.0, 1047.63657-0.372589265*T^1+9.45304214E-4*T^2-6.02409443E-7*T^3+1.2858961E-10*T^4}; argunit = K; fununit = J/(kg*K)
      rho: Analytic | expr = pA*0.02897/R_const[K*mol/J]/T; args = {pA, T}; dermethod = manual; argders = {{pA, d(pA*0.02897/R_const/T,pA)}, {T, d(pA*0.02897/R_const/T,T)}}; argunit = Pa,K; fununit = kg/m^3
      k: Piecewise | arg = T; pieces = {200.0, 1600.0, -0.00227583562+1.15480022E-4*T^1-7.90252856E-8*T^2+4.11702505E-11*T^3-7.43864331E-15*T^4}; argunit = K; fununit = W/(m*K)
      cs: Analytic | expr = sqrt(1.4*R_const[K*mol/J]/0.02897*T); args = T; dermethod = manual; argunit = K; fununit = m/s
      an1: Analytic | funcname = alpha_p; expr = -1/rho(pA,T)*d(rho(pA,T),T); args = {pA, T}; argunit = Pa,K; fununit = 1/K
      an2: Analytic "Analytic 2a" | funcname = muB; expr = 0.6*eta(T); args = T; argunit = K; fununit = Pa*s
    RefractiveIndex
      n = 1
      ki = 0
    NonlinearModel
      BA = (def.gamma+1)/2
  mat2: Common "substrate" on selection sel3
    RefractiveIndex
      n = 1.5
      ki = 0
  mat3: Common "Si (Silicon) (Green 2008: n,k 0.25-1.45 µm)" on selection uni1
    RefractiveIndex
      n = n_interp(c_const/freq)
      ki = k_interp(c_const/freq)
      int1: Interpolation "Refractive index"
        funcname = n_interp
        table = 
          {2.5E-7, 1.665}
          {2.6E-7, 1.757}
          {2.7E-7, 2.068}
          {2.8E-7, 2.959}
          {2.9E-7, 4.356}
          {3.0E-7, 4.976}
          {3.1E-7, 5.121}
          {3.2E-7, 5.112}
          {3.3E-7, 5.195}
          {3.4e-07, 5.301}
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        interp = piecewisecubic
        argunit = m
        fununit = 1
      int2: Interpolation "Refractive index, imaginary part"
        funcname = k_interp
        table = 
          {2.5E-7, 3.665}
          {2.6E-7, 4.084}
          {2.7E-7, 4.68}
          {2.8E-7, 5.287}
          {2.9E-7, 5.286}
          {3.0E-7, 4.234}
          {3.1E-7, 3.598}
          {3.2E-7, 3.303}
          {3.3E-7, 3.1}
          {3.4e-07, 2.977}
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        interp = piecewisecubic
        argunit = m
        fununit = 1

Physics
  ewfd: ElectromagneticWavesFrequencyDomain on all domains
    dependent variable E = {Ex, Ey, Ez}
    wee1: WaveEquationElectric (default)
    pec1: PerfectElectricConductor (default)
    init1: init "Initial Values 1" (default)
    sctr1: Scattering "Scattering Boundary Condition 1" on boundaries 2, 3, 7, 8, 12, 13, 24, 27, 30, 37, 42, 48
    ffd1: FarFieldDomain on domains 7, 8
      ffc1: FarFieldCalculation on boundaries 14-18, 20-22, 31-34, 38, 41, 43, 45
    epd1: ElectricPointDipole on points 13
      DipoleSpecification = DipoleMoment
      pI = {1, i, 0}
      enpI = {1, i, 0}
      normpI = 1

Mesh
  mesh1 "Mesh 1"
    size: MeshSizeDefault | hmax = wl/5; custom = on
    size1: Size on selection sel3 | hmax = wl/5/1.5; custom = on
    size2: Size on selection uni1 | hmax = wl/5/3.5; custom = on
    ftet1: FreeTet "Free Tetrahedral 1" on selection com2
    swe1: Sweep "Swept 1" on selection sel1
      dis1: Distribution on selection sel1

Studies
  std1 "Study 1"
    freq: Frequency "Frequency Domain" | punit = THz; plist = c_const/wl

Derived values
  gev1: EvalGlobal "Global Evaluation 1" | expr = sigma